// SBML level 3 version 1

model main()
  // model units - time: second, extent: mole
  // conversionFactor convertFromMilliMole

  // Compartments:
  compartment comp = 1e-14 litre;

  // Species:
  species ES in comp = 0;  // substance in milliMole
  species P in comp = 0;  // substance in gram; conversionFactor convertFromGram
  species S in comp = 1e-17/comp;  // substance in milliMole
  species E in comp = 5e-16/comp;  // substance in milliMole

  // Parameters:
  convertFromMilliMole = 1e-6 dimensionless;
  convertFromGram = 5.2e19 mole_per_gram;

  // Reactions:
  veq: E + S -> ES; comp*(kon*E*S - koff*ES);
    kon = 1000000 litre_per_mole_second; koff = 0.2 per_second;
  vcat: ES => E + P; comp*kcat*ES;
    kcat = 0.1 per_second;

  // Unit definitions:
  unit per_second = 1 / second;
  unit litre_per_mole_second = litre / (mole * second);
  unit milliMole = 1e-3 mole;
  unit mole_per_gram = mole / gram;
end
